# 1. Wymiarowanie płatwi
# Gatunek stali: | S275
# Granica plastyczności:
f_y := 275 N/mm^2
# Moduły sprężystości:
E := 210000 N/mm^2
G := 80770 N/mm^2
# Współczynniki częściowe:
γ_M0 := 1.0
γ_M1 := 1.0
# Współczynnik częściowy oddziaływania stałego przy obliczaniu górnej wartości obliczeniowej:
γ_G.sup := 1.35
# Współczynnik częściowy oddziaływania stałego przy obliczaniu dolnej wartości obliczeniowej:
γ_G.inf := 1.00
# Współczynnik częściowy oddziaływania zmiennego przy obliczaniu wartości obliczeniowej:
γ_Q := 1.50
# Współczynnik redukcyjny niekorzystnej wartości oddziaływania stałego:
ξ := 0.85
# Rozpiętość płatwi:
L := 6000 mm
# Rozstaw płatwi:
a_roz := 2350 mm
# Kąt nachylenia połaci:
α := 8°
cos(α) = 0.990268
# Pokrycie z blachy trapezowej Ruukki T20
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# Rys. 1. Wymiary dachy trapezowej
# Przekrój poprzeczny: | dwuteownik walcowany IPE 160
# Wysokość przekroju:
h_plat := 160 mm
# Szerokość stopki:
b_plat := 82 mm
# Grubość stopki:
t_f.plat := 7.4 mm
# Wysokość płaskiej części środnika:
h_w.plat := h_plat - 2*t_f.plat = 145.2 mm
# Grubość środnika:
t_w.plat := 5.0 mm
# Promień zaokrąglenia:
r_plat := 9 mm
# Pole powierzchni przekroju:
A_plat := 20.1 cm^2
# Momenty bezwładności:
I_y.plat := 869 cm^4
I_z.plat := 68.3 cm^4
I_t.plat := 3.60 cm^4
I_ω.plat := 3960 cm^6
# Wskaźnik sprężysty:
W_el.y.plat := 109 cm^3
# Wskaźnik plastyczny:
W_pl.y.plat := 124 cm^3
# 1.1. Stężenie boczne górnej stopki
# Szerokość przepony dachowej:
b_roof := 6000  # [mm]
# Rozstaw płatwi:
s := a_roz = 2350 mm
# Wysokość profilu poszycia:
h_w.bl := 17 mm
# Grubość blachy poszycia:
t_bl := 0.5  # [mm]
# Sztywność na ścinanie blachy trapezowej połączonej z płatwią w każdej fałdzie po obu stronach zakładki i na obu brzegach:
S := 1000*sqrt(t_bl^3)*(50 + 10*nthroot(b_roof, 3))*s/h_w.bl*1 N = 11324.6 kN*m/m
S_min := (π^2*E*I_ω.plat/L^2 + G*I_t.plat + π^2*E*I_z.plat*(h_plat/2)^2/L^2)*70/h_plat^2 = 9262.34 kN*m/m
# S > S_min zatem warunek został spełniony. Sztywność poszycia jest wystarczająca, aby pominąć składowe styczne obciążeń.
# 1.2. Obciążenie płatwi
# Ciężar IPE 160:
g_p := (15.8 kg/m)*(10 N/kg) = 0.158 kN/m
# Ciężar obudowy dachowej:
g_d := (4.7 kg/m^2)*(10 N/kg) + (0.9 kN/m^3)*0.15 m + (0.14 kg/m^2)*(10 N/kg) = 0.1834 kN/m^2
# Obciążenie śniegiem połaci:
s := 0.96 kN/m^2
# Obciążenie wiatrem połaci:
# Kategoria terenu: | III
# Wartość bazowa ciśnienia prędkości wiatru q_b.0:
q_b.0 := 0.207 kN/m^2
# Wartość bazowa ciśnienia prędkości wiatru q_b.90:
q_b.90 := 0.342 kN/m^2
# Wysokość budynku:
z := 7.51 m
# Współczynnik ekspozycji:
c_e.z := 1.9*(z/(10 m))^0.26 = 1.76368
# Szczytowe ciśnienie prędkości wiatru przy Θ=0°:
q_p.z.0 := c_e.z*q_b.0 = 0.365082 kN/m^2
# Szczytowe ciśnienie prędkości wiatru przy Θ=90°:
q_p.z.90 := c_e.z*q_b.90 = 0.603179 kN/m^2
# Wartość współczynnika e przy Θ=0°:
e_0 := min(60 m, 2*z) = 15.02 m
# Wartość współczynnika e przy Θ=90°:
e_90 := min(14.1 m, 2*z) = 14.1 m
# Wartości c_pe dla poszczególnych pól połaci przy Θ=0°:
c_pe.0.G1 := -0.92
c_pe.0.G2 := 0.06
c_pe.0.H1 := -0.39
c_pe.0.H2 := 0.06
c_pe.0.I1 := -0.46
c_pe.0.I2 := -0.42
c_pe.0.J1 := 0.14
c_pe.0.J2 := -0.42
# Wartości c_pe dla poszczególnych pól połaci przy Θ=90°:
c_pe.90.H := -0.67
c_pe.90.I := -0.57
# Wartości c_pi:
c_pi.1 := 0.2
c_pi.2 := -0.3
# Przyjęto wartości najbardziej niekorzystne, tj.:
c_pe.0 := c_pe.0.G1 = -0.92
c_pe.90 := c_pe.90.H = -0.67
c_pi := c_pi.1 = 0.2
# Wartość obciążenia wiatrem przy Θ=0°:
w_e.0 := q_p.z.0*(c_pe.0 - c_pi) = -0.408892 kN/m^2
# Wartość obciążenia wiatrem przy Θ=90°:
w_e.90 := q_p.z.90*(c_pe.90 - c_pi) = -0.524766 kN/m^2
# Największą wartość obciążenie wiatrem osiąga przy Θ=90°, zatem do dalszych obliczeń przyjęto w_e := w_e.90.
# Obciążenie stałe:
G_k.plat := g_p*cos(α) + g_d*a_roz*cos(α) = 0.583258 kN/m
# Obciążenie śniegiem:
Q_k.s := s*a_roz*cos(α)^2 = 2.2123 kN/m
# Obciążenie wiatrem:
Q_k.w := w_e*a_roz = -1.2332 kN/m
# 1.3. Kombinacje stanu granicznego nośności
# Kombinacja 1:
F_uls.c1 := ξ*γ_G.sup*G_k.plat + γ_Q*Q_k.s = 3.98774 kN/m
# Kombinacja 2:
F_uls.c2 := γ_G.inf*G_k.plat + γ_Q*Q_k.w = -1.26654 kN/m
# Maksymalny moment przęsłowy - kombinacja 1:
M_y.Ed.c1 := 0.125*F_uls.c1*L^2 = 17.9448 kN*m
# Maksymalny moment przęsłowy - kombinacja 2:
M_y.Ed.c2 := 0.125*F_uls.c2*L^2 = -5.69943 kN*m
# Maksymalna siła tnąca przy podporze - kombinacja 1:
V_z.Ed.c1 := 0.5*F_uls.c1*L = 11.9632 kN
# Maksymalna siła tnąca przy podporze - kombinacja 2:
V_z.Ed.c2 := 0.5*F_uls.c2*L = -3.79962 kN
# Klasa przekroju przy zginaniu względem osi y-y
# Współczynnik ε:
ε := sqrt(235/(f_y*mm^2/N)) = 0.924416
# Stosunek szerokości do grubości:
# - Środnika:
(h_plat - 2*t_f.plat - 2*r_plat)/t_w.plat = 25.44
# <
72*ε = 66.558
# - Stopki:
(b_plat - t_w.plat - 2*r_plat)/(2*t_f.plat) = 3.98649
# <
9*ε = 8.31975
# Przy zginaniu względem osi y-y przekrój jest klasy 1.
# 1.4. Nośność obliczeniowa przekroju przy zginaniu
M_c.y.Rd := W_pl.y.plat*f_y/γ_M0 = 34.1 kN*m
# Warunki nośności przekroju przy zginaniu
# Kombinacja 1:
M_y.Ed.c1/M_c.y.Rd = 0.526242
# Kombinacja 2:
|M_y.Ed.c2|/M_c.y.Rd = 0.167139
# Warunki zostały spełnione.
# Wyznaczenie momentu krytycznego
# Współczynniki długości efektywnej k oraz k_w przyjęto równe 1,0.
# Odległość od punktu przyłożenia obciążenia do środka ścinania przekroju:
z_g := h_plat/2 + h_w.bl + 15 cm = 247 mm
# Współczynniki C_1 i C_2:
C_1 := 1.127
C_2 := 0.454
# Moment krytyczny:
M_cr := C_1*π^2*E*I_z.plat/L^2*(sqrt(I_ω.plat/I_z.plat + L^2*G*I_t.plat/(π^2*E*I_z.plat) + (C_2*z_g)^2) - C_2*z_g) = 8.4955 kN*m
# Nośność na zwichrzenie
# Smukłość względna:
λ_LT := sqrt(W_pl.y.plat*f_y/M_cr) = 2.00347
# Smukłość graniczna:
λ_LT.0 := 0.4
# Współczynnik zwichrzenia:
h_plat/b_plat = 1.95122  # - obowiązuje krzywa zwichrzenia b
# Parametr imperfekcji:
α_LT := 0.34
# Współczynnik β:
β := 0.75
Φ_LT := 0.5*(1 + α_LT*(λ_LT - λ_LT.0) + β*λ_LT^2) = 2.2778
# Współczynnik zwichrzenia:
χ_LT := 1/(Φ_LT + sqrt(Φ_LT^2 - β*λ_LT^2)) = 0.266412
# >
min(1.0, 1/λ_LT^2) = 0.249135
χ_LT := 1/λ_LT^2 = 0.249135
# Nośność belki na zwichrzenie:
M_b.y.Rd := χ_LT*W_pl.y.plat*f_y/γ_M1 = 8.4955 kN*m
# Sprawdzenie nośności belki ze względu na zwichrzenie
|M_y.Ed.c2|/M_b.y.Rd = 0.670877
# Warunek został spełniony.
# 1.5. Sprawdzenie nośności belki przy ścinaniu przy podporze
η := 1.20
# Warunek stateczności miejscowej przy ścinaniu:
h_w.plat/t_w.plat = 29.04  # <
72*ε/η = 55.465
# Środnik nie jest wrażliwy na niestateczność przy ścinaniu.
# Pole przekroju czynnego:
A_v.z := A_plat - b_plat*t_f.plat + (t_w.plat + 2*r_plat)*t_f.plat = 1573.4 mm^2
# lecz nie mniej niż
η*h_w.plat*t_w.plat = 871.2 mm^2
# Obliczeniowa nośność przekroju przy ścinaniu:
V_pl.z.Rd := A_v.z*f_y/sqrt(3)/γ_M0 = 249.811 kN
# Warunki nośności przy podporze
# Kombinacja 1:
V_z.Ed.c1/V_pl.z.Rd = 0.0478892
# Kombinacja 2:
|V_z.Ed.c2|/V_pl.z.Rd = 0.01521
# Warunki zostały spełnione.
# 1.6. Stan graniczny użytkowalności
# Kombinacja 3:
F_sls.c3 := G_k.plat + Q_k.s = 2.79556 kN/m
# Całkowite ugięcie belki:
w_tot := 5*F_sls.c3*L^4/(384*E*I_y.plat) = 25.8508 mm
# Maksymalne ugięcie belki:
w_max := w_tot = 25.8508 mm
# Kombinacja 4:
F_sls.c4 := Q_k.s = 2.2123 kN/m
# Ugięcie od obciążenia śniegiem:
w_4 := 5*F_sls.c4*L^4/(384*E*I_y.plat) = 20.4573 mm
# Wartość graniczna ugięcia:
w_s := 1/200*L = 30 mm
# Warunki stanu granicznego użytkowalności
# Kombinacja 3:
w_max/w_s = 0.861693
# Kombinacja 4:
w_4/w_s = 0.681912
# Warunki zostały spełnione.
# 2. Rama portalowa
# 2.1. Dane
# Długość hali:
b_hali := 60.00 m
# Szerokość hali:
d_hali := 14.10 m
# Rozstaw ram:
s_ram := 6.00 m
# Rozpiętość ramy:
d_ram := 14.10 m
# Wysokość słupa:
h_słupa := 5.90 m
# Wysokość w kalenicy:
h_kalenicy := 7.04 m
# Kąt pochylenia połaci:
α = 8°
# Lokalizacja obiektu: | Kraków
# 2.2 Profile
# 2.2.1. Słup
# Profil HEB 300 - stal S275
# Wysokość profilu:
h_słup := 320 mm
# Wysokość środnika:
h_w.słup := 279 mm
# Wysokość płaskiej części środnika:
d_w.słup := 225 mm
# Szerokość półki:
b_słup := 300 mm
# Grubość środnika:
t_w.słup := 11.5 mm
# Grubość pasa:
t_f.słup := 20.5 mm
# Promień wyokrąglenia:
r_słup := 27 mm
# Masa:
m_słup := 127 kg/m
# Pole przekroju:
A_słup := 161.3 cm^2
# Momenty bezwładności:
I_y.słup := 30820 cm^4
I_z.słup := 9239 cm^4
# Moment bezwładności przy skręcaniu swobodnym:
I_t.słup := 225.1 cm^4
# Moment bezwładności przy skręcaniu skrępowanym:
I_ω.słup := 2069000 cm^6
# Wskaźniki wytrzymałości (sprężyste):
W_el.y.słup := 1926 cm^3
W_el.z.słup := 615.9 cm^3
# Wskaźniki wytrzymałości (plastyczne):
W_pl.y.słup := 2149 cm^3
W_pl.z.słup := 939.1 cm^3
# 2.1.2. Rygiel
# Profil IPE 360 - stal S275
# Wysokość profilu:
h_ryg := 360 mm
# Wysokość środnika:
h_w.ryg := 334.6 mm
# Wysokość płaskiej części środnika:
d_w.ryg := 398.6 mm
# Szerokość półki:
b_ryg := 170 mm
# Grubość środnika:
t_w.ryg := 8.0 mm
# Grubość pasa:
t_f.ryg := 12.7 mm
# Promień wyokrąglenia:
r_ryg := 18 mm
# Masa:
m_ryg := 57.1 kg/m
# Pole przekroju:
A_ryg := 72.7 cm^2
# Momenty bezwładności:
I_y.ryg := 16270 cm^4
I_z.ryg := 1043 cm^4
# Moment bezwładności przy skręcaniu swobodnym:
I_t.ryg := 37.3 cm^4
# Moment bezwładności przy skręcaniu skrępowanym:
I_ω.ryg := 314000 cm^6
# Wskaźniki wytrzymałości (sprężyste):
W_el.y.ryg := 904 cm^3
W_el.z.ryg := 123 cm^3
# Wskaźniki wytrzymałości (plastyczne):
W_pl.y.ryg := 1019 cm^3
W_pl.z.ryg := 191 cm^3
# 2.3. Obciążenia
# Obciążenie stałe
# - Ciężar własny elementów ramy
# - Ciężar pokrycia dachowego wraz z płatwiami:
G_pokrycia := g_d*s_ram + g_p = 1.2584 kN/m
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# Rys. 2. Obciążenie stałe ramy pośredniej
# Obciążenie śniegiem
# Charakterystyczne obciążennie śniegiem dachu:
S := s*s_ram = 5.76 kN/m
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# Rys. 3. Obciążenie śniegiem ramy pośredniej
# Obciążenie wiatrem
# Obciążenie wiatrem poszczególnych pól:
# Szczytowe ciśnienie prędkości wiatru przy Θ=0°:
q_p.z.0 = 0.365082 kN/m^2
# Wartość współczynnika e przy Θ=0°:
e_0 = 15.02 m
# Stosunek wysokości do szerokości hali:
h_kalenicy/d_hali = 0.499291
# Wartości c_pe dla poszczególnych pól połaci przy Θ=0°:
c_pe.0.D := 0.8
c_pe.0.E := -0.7
c_pe.0.G := -0.92
c_pe.0.H := -0.39
c_pe.0.I := -0.46
c_pe.0.J := -0.42
# Wartość c_pi:
c_pi = 0.2
# Wartość obciążenia wiatrem przy Θ=0° na metr bieżący ramy:
w_e.0.D := q_p.z.0*(c_pe.0.D - c_pi)*s_ram = 1.31429 kN/m
w_e.0.E := q_p.z.0*(c_pe.0.E - c_pi)*s_ram = -1.97144 kN/m
w_e.0.G := q_p.z.0*(c_pe.0.G - c_pi)*s_ram = -2.45335 kN/m
w_e.0.H := q_p.z.0*(c_pe.0.H - c_pi)*s_ram = -1.29239 kN/m
w_e.0.I := q_p.z.0*(c_pe.0.I - c_pi)*s_ram = -1.44572 kN/m
w_e.0.J := q_p.z.0*(c_pe.0.J - c_pi)*s_ram = -1.3581 kN/m
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# Rys. 4. Obciążenie wiatrem ramy pośredniej
# 2.4. Kombinacje obciążeń
# Częściowe współczynniki bezpieczeństwa:
γ_Gmax := 1.35
γ_Gmin := 1.00
γ_Q := 1.50
ψ_0.śnieg := 0.5
ψ_0.wiatr := 0.6
γ_M0 = 1
γ_M1 = 1
# Kombinacje SGN:
# Kombinacja 101:
γ_Gmax*G + γ_Q*Q_s
# Kombinacja 102:
γ_Gmin*G + γ_Q*Q_w
# Kombinacja 103:
γ_Gmax*G + γ_Q*Q_s + γ_Q*ψ_0.wiatr*Q_w
# Kombinacja 104:
γ_Gmin*G + γ_Q*Q_s + γ_Q*ψ_0.wiatr*Q_w
# Kombinacja 105:
γ_Gmax*G + γ_Q*ψ_0.śnieg*Q_s + γ_Q*Q_w
# Kombinacja 106:
γ_Gmin*G + γ_Q*ψ_0.śnieg*Q_s + γ_Q*Q_w
# Kombinacje SGU:
# Kombinacja 201:
G + S
# Kombinacja 202:
G + W
# 2.5. Analiza globalna
# 2.5.1. Wyznaczenie mnożnika krytycznego
# Wartość mnożnika krytycznego wyznaczona została dla kombinacji 101, gdyż występują
# w niej największe siły osiowe w słupie. Wartość mnożnika wyniosła α_cr := 18.178.
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# Rys. 6. Postać wyboczeniowa odpowiadająca mnożnikowi krytycznemu α_cr = 18.178
α_cr = 18.178  # >
10
# Rama nie jest wrażliwa na efekty II rzędu.
# 2.5.2. Wpływ imperfekcji
# Wartość podstawowa:
ϕ_0 := 1/200 = 0.005
# Współczynnik redukcyjny ze względu na wysokość:
α_h := 2/sqrt(h_kalenicy/(1 m)) = 0.753778
# Współczynnik redukcyjny ze względu na liczbę słupów (m := 2):
α_m := sqrt(0.5*(1 + 1/m)) = 0.866025
# Globalna imperfekcja przechyłowa (przchył słupów):
ϕ := ϕ_0*α_h*α_m = 0.00326396
# Reakcje podporowe w kombinacji 101:
H_Ed.1.1 := 25.999 kN
V_Ed.1.1 := 89.753 kN
H_Ed.2.1 := -25.999 kN
V_Ed.2.1 := 89.753 kN
H_Ed.101 := H_Ed.1.1 + H_Ed.2.1 = 0 kN
V_Ed.101 := V_Ed.1.1 + V_Ed.2.1 = 179.506 kN
0.15*|V_Ed.101| = 26.9259 kN
# >
|H_Ed.101| = 0 kN
# Należy uwzględnić wpływ imperfekcji przechyłowej.
# Reakcje podporowe w kombinacji 102:
H_Ed.1.2 := -13.250 kN
V_Ed.1.2 := -2.019 kN
H_Ed.2.2 := -15.583 kN
V_Ed.2.2 := 11.482 kN
H_Ed.102 := H_Ed.1.2 + H_Ed.2.2 = -28.833 kN
V_Ed.102 := V_Ed.1.2 + V_Ed.2.2 = 9.463 kN
0.15*|V_Ed.102| = 1.41945 kN
# <
|H_Ed.102| = 28.833 kN
# Wpływ imperfekcji przechyłowej można pominąć.
# Reakcje podporowe w kombinacji 103:
H_Ed.1.3 := 15.493 kN
V_Ed.1.3 := 76.299 kN
H_Ed.2.3 := -32.793 kN
V_Ed.2.3 := 84.400 kN
H_Ed.103 := H_Ed.1.3 + H_Ed.2.3 = -17.3 kN
V_Ed.103 := V_Ed.1.3 + V_Ed.2.3 = 160.699 kN
0.15*|V_Ed.103| = 24.1048 kN
# >
|H_Ed.103| = 17.3 kN
# Należy uwzględnić wpływ imperfekcji przechyłowej.
# Reakcje podporowe w kombinacji 104:
H_Ed.1.4 := 14.002 kN
V_Ed.1.4 := 69.158 kN
H_Ed.2.4 := -31.301 kN
V_Ed.2.4 := 77.259 kN
H_Ed.104 := H_Ed.1.4 + H_Ed.2.4 = -17.299 kN
V_Ed.104 := V_Ed.1.4 + V_Ed.2.4 = 146.417 kN
0.15*|V_Ed.104| = 21.9626 kN
# >
|H_Ed.104| = 17.299 kN
# Należy uwzględnić wpływ imperfekcji przechyłowej.
# Reakcje podporowe w kombinacji 105:
H_Ed.1.5 := -1.635 kN
V_Ed.1.5 := 36.226 kN
H_Ed.2.5 := -27.198 kN
V_Ed.2.5 := 49.727 kN
H_Ed.105 := H_Ed.1.5 + H_Ed.2.5 = -28.833 kN
V_Ed.105 := V_Ed.1.5 + V_Ed.2.5 = 85.953 kN
0.15*|V_Ed.105| = 12.8929 kN
# <
|H_Ed.105| = 28.833 kN
# Wpływ imperfekcji przechyłowej można pominąć.
# Reakcje podporowe w kombinacji 106:
H_Ed.1.6 := -3.126 kN
V_Ed.1.6 := 29.085 kN
H_Ed.2.6 := -25.707 kN
V_Ed.2.6 := 42.586 kN
H_Ed.106 := H_Ed.1.6 + H_Ed.2.6 = -28.833 kN
V_Ed.106 := V_Ed.1.6 + V_Ed.2.6 = 71.671 kN
0.15*|V_Ed.106| = 10.7507 kN
# <
|H_Ed.106| = 28.833 kN
# Wpływ imperfekcji przechyłowej można pominąć.
# Wpływ imperfekcji uwzględniono w kombinacjach 101, 103, 104.
# Wprowadzona siła zastępcza:
# Kombinacja 101:
H_Eq.101 := ϕ*V_Ed.101 = 0.5859 kN
# Kombinacja 103:
H_Eq.103 := ϕ*V_Ed.103 = 0.524514 kN
# Kombinacja 104:
H_Eq.104 := ϕ*V_Ed.104 = 0.477899 kN
# 2.6. Analiza sprężysta
# 2.6.1. Stan graniczny użytkowalności
# Wartości graniczne przemieszczeń:
# - Pionowa:
w_y.lim := d_ram/250 = 56.4 mm
# - Pozioma:
w_x.lim := h_słupa/150 = 39.3333 mm
# Wartości maksymalne przemieszczeń:
# - Kombinacja 201:
w_y.max.201 := 29.19 mm
# <
w_y.lim = 56.4 mm
# - Kombinacja 202:
w_y.max.202 := 18.89 mm
# <
w_y.lim = 56.4 mm
# Dopuszczalne wartości przemieszczeń nie zostały przekroczone.
# 2.6.2. Stan graniczny nośności
# Wykresy momentów dla poszczególnych kombinacji:
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# Rys. 7. Wykres momentów zginających w kombinacji 101
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# Rys. 8. Wykres momentów zginających w kombinacji 102
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# Rys. 9. Wykres momentów zginających w kombinacji 103
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# Rys. 10. Wykres momentów zginających w kombinacji 104
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# Rys. 11. Wykres momentów zginających w kombinacji 105
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# Rys. 12. Wykres momentów zginających w kombinacji 106
# 2.7. Wymiarowanie słupa
# Obliczenia przeprowadzone zostały dla kombinacji 101 (w której występuje maksymalna siła ściskająca) oraz kombinacji 103 (w której występują maksymalny moment zginający oraz maksymalna siła tnąca).
N_Ed.101 := 89.998 kN
V_Ed.101 := 26.261 kN
M_Ed.101 := 154.943 kN*m
N_Ed.103 := 84.620 kN
V_Ed.103 := 33.028 kN
M_Ed.103 := 163.991 kN*m
# 2.7.1. Określenie klasy przekroju - kombinacja 101
# - Środnika (ściskanie mimośrodowe):
d_N := N_Ed.101/(t_w.słup*f_y) = 28.4579 mm
α_słup := (d_w.słup + d_N)/(2*d_w.słup) = 0.56324  # >
0.5
# Smukłość graniczna dla klasy 1:
396*ε/(13*α_słup - 1) = 57.9029
# Smukłość płytowa środnika:
d_w.słup/t_w.słup = 19.5652
# <
57.903
# Ścianka środnika jest klasy 1.
# - Pasa (ściskanie osiowe):
# Smukłość pasa:
(b_słup - t_w.słup - 2*r_słup)/(2*t_f.słup) = 5.71951
# <
9*ε = 8.31975
# Pas jest klasy 1. Cały przekrój spełnia warunki klasy 1.
# 2.7.2. Sprawdzenie obliczeniowej nośności przekroju przy ścinaniu - kombinacja 101
# Pole przekroju czynnego przy ścinaniu:
A_v := A_słup - 2*b_słup*t_f.słup + (t_w.słup + 2*r_słup)*t_f.słup = 5172.75 mm^2
η*h_w.słup*t_w.słup = 3850.2 mm^2  # <
A_v = 5172.75 mm^2
# Obliczeniowa nośność przekroju przy ścinaniu:
V_pl.Rd := A_v*(f_y/sqrt(3))/γ_M0 = 821.284 kN
# Warunek stanu granicznego nośności
V_Ed.101/V_pl.Rd = 0.0319755  # <
0.50
# Warunek został spełniony, zatem pominięta została siła poprzeczna przy obliczaniu nośności przy zginaniu.
# 2.7.3. Sprawdzenie obliczeniowej nośności przekroju przy równomiernym ściskaniu -  kombinacja 101
# Obliczeniowa nośność przekroju przy ściskaniu:
N_pl.Rd := A_słup*f_y/γ_M0 = 4435.75 kN
# Warunek stanu granicznego nośności
N_Ed.101/N_pl.Rd = 0.0202892
# <
1
# Warunek został spełniony.
N_Ed.101 = 89.998 kN  # <
0.25*N_pl.Rd = 1108.94 kN
N_Ed.101 = 89.998 kN  # <
0.5*h_w.słup*t_w.słup*f_y/γ_M0 = 441.169 kN
# Pominięta została siła podłużna przy obliczaniu nośności przy zginaniu.
# 2.7.4. Sprawdzenie obliczeniowej nośności przekroju przy zginaniu - kombinacja 101
# Obliczeniowa nośność przekroju przy zginaniu:
M_pl.y.Rd := W_pl.y.słup*f_y/γ_M0 = 590.975 kN*m
# Warunek stanu granicznego nośności
M_Ed.101/M_pl.y.Rd = 0.262182  # <
1
# Warunek został spełniony.
# 2.7.5. Sprawdzenie warunków stateczności słupa - kombinacja 101
# Długości wyboczeniowe przy wyboczeniu:
# - względem osi y-y:
L_cr.y := h_słupa = 5.9 m
# - względem osi z-z:
L_cr.z := h_słupa = 5.9 m
# Długość krytyczna przy zwichrzeniu:
L_cr.LT := h_słupa = 5.9 m
# Wyboczenie względem osi y-y (w płaszczyźnie ramy)
h_słup/b_słup = 1.06667  # - obowiązuje krzywa wyboczenia b
# Parametr imperfekcji:
α_y := 0.34
# Siła krytyczna:
N_cr.y := π^2*E*I_y.słup/L_cr.y^2 = 18350.5 kN
# Smukłość względna:
λ_y := sqrt(A_słup*f_y/N_cr.y) = 0.491654
Φ_y := 0.5*(1 + α_y*(λ_y^2 - 0.2) + λ_y^2) = 0.627955
χ_y := 1/(Φ_y + sqrt(Φ_y^2 - λ_y^2)) = 0.98174  # <
1
# Wyboczenie względem osi z-z (z płaszczyzny ramy)
h_słup/b_słup = 1.06667  # - obowiązuje krzywa wyboczenia c
# Parametr imperfekcji:
α_z := 0.49
# Siła krytyczna:
N_cr.z := π^2*E*I_z.słup/L_cr.z^2 = 5500.98 kN
# Smukłość względna:
λ_z := sqrt(A_słup*f_y/N_cr.z) = 0.897974
Φ_z := 0.5*(1 + α_z*(λ_z^2 - 0.2) + λ_z^2) = 1.05174
χ_z := 1/(Φ_z + sqrt(Φ_z^2 - λ_z^2)) = 0.625286  # <
1
# Wyboczenie giętno-skrętne (zwichrzenie)
h_słup/b_słup = 1.06667  # - obowiązuje krzywa zwichrzenia a
# Parametr imperfekcji:
α_LT := 0.21
# Współczynnik C_1:
C_1 := 1.77
# Moment krytyczny:
M_cr := C_1*π^2*E*I_z.słup/L_cr.LT^2*sqrt(I_ω.słup/I_z.słup + L_cr.LT^2*G*I_t.słup/(π^2*E*I_z.słup)) = 2292.69 kN*m
# Smukłość względna:
λ_LT := sqrt(W_pl.y.słup*f_y/M_cr) = 0.507705
# Współczynnik zwichrzenia:
χ_LT := 1/(Φ_LT + sqrt(Φ_LT^2 - β*λ_LT^2)) = 0.221594
# <
min(1.0, 1/λ_LT^2) = 1
# Zmodyfikowany współczynnik zwichrzenia (ψ := 0):
C_mLT := max(0.6 + 0.4*ψ, 0.4) = 0.6
k_c := C_mLT^0.5 = 0.774597
f := 1 - 0.5*(1 - k_c)*(1 - 2*(λ_LT - 0.8)^2) = 0.906556
χ_LT.mod := min(χ_LT/f, 1/λ_LT^2, 1) = 0.244435
# Wyznaczenie współczynników interakcji
C_my := 0.9
# Charakterystyczna nośność przy ściskaniu:
N_Rk := A_słup*f_y = 4435.75 kN
# Charakterystyczna nośność przy zginaniu:
M_y.Rk := W_pl.y.słup*f_y = 590.975 kN*m
k_yy := min(C_my*(1 + (λ_y - 0.2)*N_Ed.101/(χ_y*N_Rk/γ_M1)), C_my*(1 + 0.8*N_Ed.101/(χ_y*N_Rk/γ_M1))) = 0.905425
k_zy := 0
# Sprawdzenie interakcyjnych formuł nośności słupa
N_Ed.101/(χ_y*N_Rk/γ_M1) + k_yy*M_Ed.101/(χ_LT.mod*M_y.Rk/γ_M1) = 0.991829
# <
1
# Stateczność słupa jest zapewniona.
# 2.7.6. Określenie klasy przekroju - kombinacja 103
# - Środnika (ściskanie mimośrodowe):
d_N := N_Ed.103/(t_w.słup*f_y) = 26.7573 mm
α_słup := (d_w.słup + d_N)/(2*d_w.słup) = 0.559461  # >
0.5
# Smukłość graniczna dla klasy 1:
396*ε/(13*α_słup - 1) = 58.3564
# Smukłość płytowa środnika:
d_w.słup/t_w.słup = 19.5652
# <
58.356
# Ścianka środnika jest klasy 1.
# - Pasa (ściskanie osiowe):
# Smukłość pasa:
(b_słup - t_w.słup - 2*r_słup)/(2*t_f.słup) = 5.71951
# <
9*ε = 8.31975
# Pas jest klasy 1. Cały przekrój spełnia warunki klasy 1.
# 2.7.7. Sprawdzenie obliczeniowej nośności przekroju przy ścinaniu - kombinacja 103
# Warunek stanu granicznego nośności
V_Ed.103/V_pl.Rd = 0.0402151
# <
0.50
# Warunek został spełniony, zatem pominięta została siła poprzeczna przy obliczaniu nośności przy zginaniu.
# 2.7.8. Sprawdzenie obliczeniowej nośności przekroju przy równomiernym ściskaniu -  kombinacja 103
# Warunek stanu granicznego nośności
N_Ed.103/N_pl.Rd = 0.0190768  # <
1
# Warunek został spełniony.
# 2.7.9. Sprawdzenie obliczeniowej nośności przekroju przy zginaniu - kombinacja 103
# Warunek stanu granicznego nośności
M_Ed.103/M_pl.y.Rd = 0.277492  # <
1
# Warunek został spełniony.
# 2.7.10. Sprawdzenie warunków stateczności słupa - kombinacja 103
# Wyznaczenie współczynników interakcji
k_yy := min(C_my*(1 + (λ_y - 0.2)*N_Ed.103/(χ_y*N_Rk/γ_M1)), C_my*(1 + 0.8*N_Ed.103/(χ_y*N_Rk/γ_M1))) = 0.905101
k_zy := 0
# Sprawdzenie interakcyjnych formuł nośności słupa
N_Ed.101/(χ_y*N_Rk/γ_M1) + k_yy*M_Ed.101/(χ_LT.mod*M_y.Rk/γ_M1) = 0.991482
# <
1
# Stateczność słupa jest zapewniona.
# 2.8. Wymiarowanie rygla
# Obliczenia przeprowadzono dla kombinacji ...
N_Ed := □  # error: Missing term or expression.
V_Ed := □  # error: Missing term or expression.
M_Ed := □  # error: Missing term or expression.
# 2.8.1. Określenie klasy przekroju
# - Środnika (ściskanie mimośrodowe):
d_N := N_Ed/(t_w.ryg*f_y)
α_ryg := (d_w.ryg + d_N)/(2*d_w.ryg)
# >
0.5
# Smukłość graniczna dla klasy 1:
396*ε/(13*α_ryg - 1) =  # error: This variable is undefined. Check that the label is set correctly.
# Smukłość płytowa środnika:
d_w.ryg/t_w.ryg = 49.825  # <  # wynik
# Ścianka środnika jest klasy 1.
# - Pasa (ściskanie osiowe):
# Smukłość graniczna dla klasy 1:
9*ε = 8.31975
# Smukłość pasa:
(b_ryg - t_w.ryg - 2*r_ryg)/(2*t_f.ryg) = 4.96063
# <
8.32
# Pas jest klasy 1. Cały przekrój spełnia warunki klasy 1.
# 2.8.2. Sprawdzenie obliczeniowej nośności przekroju przy ścinaniu
# Pole przekroju czynnego przy ścinaniu:
A_v := A_ryg - 2*b_ryg*t_f.ryg + (t_w.ryg + 2*r_ryg)*t_f.ryg = 3510.8 mm^2
η*h_w.ryg*t_w.ryg = 3212.16 mm^2  # <
A_v = 3510.8 mm^2
# Obliczeniowa nośność przekroju przy ścinaniu:
V_pl.Rd := A_v*(f_y/sqrt(3))/γ_M0 = 557.414 kN
# Warunek stanu granicznego nośności
V_Ed/V_pl.Rd =  # error
# <
0.50
# Warunek został spełniony, zatem pominięta została siła poprzeczna przy obliczaniu nośności przy zginaniu.
# 2.8.3. Sprawdzenie obliczeniowej nośności przekroju przy równomiernym ściskaniu
# Obliczeniowa nośność przekroju przy ściskaniu:
N_pl.Rd := A_ryg*f_y/γ_M0 = 1999.25 kN
# Warunek stanu granicznego nośności
N_Ed/N_pl.Rd =  # error
# <
1
# Warunek został spełniony.
N_Ed =  # error
# <
0.25*N_pl.Rd = 499.812 kN
N_Ed =  # error
# <
0.5*h_w.ryg*t_w.ryg*f_y/γ_M0 = 368.06 kN
# Pominięta została siła podłużna przy obliczaniu nośności przy zginaniu.
# 2.8.4. Sprawdzenie obliczeniowej nośności przekroju przy zginaniu
# Obliczeniowa nośność przekroju przy zginaniu:
M_pl.y.Rd := W_pl.y.ryg*f_y/γ_M0 = 280.225 kN*m
# Warunek stanu granicznego nośności
M_Ed/M_pl.y.Rd =  # error
# <
1
# Warunek został spełniony.
# 2.8.5. Sprawdzenie warunków stateczności rygla
# Długości wyboczeniowe przy wyboczeniu giętnym względem osi z-z oraz przy wyboczeniu skrętnym oraz długość krytyczną przy zwichrzeniu przyjęto równą rozstawowi stężeń przeciwzwichrzeniowych (dwukrotność rozstawu płatwi).
L_cr.z := 2*a_roz = 4.7 m
L_cr.T := L_cr.z = 4.7 m
L_cr.LT := L_cr.z = 4.7 m
# Wyboczenie względem osi y-y (w płaszczyźnie ramy)
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α_cr := □  # error: Missing term or expression.
h_ryg/b_ryg = 2.11765  # - obowiązuje krzywa wyboczenia b
# Parametr imperfekcji:
α_y := 0.34
# Siła krytyczna:
N_cr.y := α_cr*N_Ed
# Smukłość względna:
λ_y := sqrt(A_ryg*f_y/N_cr.y)
Φ_y := 0.5*(1 + α_y*(λ_y^2 - 0.2) + λ_y^2)
χ_y := 1/(Φ_y + sqrt(Φ_y^2 - λ_y^2))
# <
1
# Wyboczenie względem osi z-z (z płaszczyzny ramy)
# Siła krytyczna:
N_cr.z := π^2*E*I_z.ryg/L_cr.z^2 = 978.605 kN
# Wyboczenie skrętne
y_0 := 0 mm
z_0 := 0 mm
I_0 := I_y.ryg + I_z.ryg + (y_0^2 + z_0^2)*A_ryg = 17313 cm^4
# Siła krytyczna:
N_cr.T := A_ryg/I_0*(G*I_t.ryg + π^2*E*I_ω.ryg/L_cr.T^2) = 2502.22 kN
N_cr := min(N_cr.z, N_cr.T) = 978.605 kN
# Smukłość względna:
λ_z := sqrt(A_ryg*f_y/N_cr) = 1.42932
h_ryg/b_ryg = 2.11765  # - obowiązuje krzywa wyboczenia a
# Parametr imperfekcji:
α_z := 0.21
Φ_z := 0.5*(1 + α_z*(λ_z^2 - 0.2) + λ_z^2) = 1.71499
χ_z := 1/(Φ_z + sqrt(Φ_z^2 - λ_z^2)) = 0.375553  # <
1
# Wyboczenie giętno-skrętne (zwichrzenie)
h_ryg/b_ryg = 2.11765  # - obowiązuje krzywa wyboczenia a
# Parametr imperfekcji:
α_LT := 0.21
ψ := □  # error: Missing term or expression.
# Współczynnik C_1:
C_1 := 1.77
# Moment krytyczny:
M_cr := C_1*π^2*E*I_z.ryg/L_cr.LT^2*sqrt(I_ω.ryg/I_z.ryg + L_cr.LT^2*G*I_t.ryg/(π^2*E*I_z.ryg)) = 427.424 kN*m
# Smukłość względna:
λ_LT := sqrt(W_pl.y.ryg*f_y/M_cr) = 0.8097
# Współczynnik zwichrzenia:
χ_LT := 1/(Φ_LT + sqrt(Φ_LT^2 - β*λ_LT^2)) = 0.224973
# <
min(1.0, 1/λ_LT^2) = 1
# Zmodyfikowany współczynnik zwichrzenia:
ψ = 0
C_mLT := max(0.6 + 0.4*ψ, 0.4) = 0.6
k_c := C_mLT^0.5 = 0.774597
f := 1 - 0.5*(1 - k_c)*(1 - 2*(λ_LT - 0.8)^2) = 0.88732
χ_LT.mod := min(χ_LT/f, 1/λ_LT^2, 1) = 0.253542
# Wyznaczenie współczynników interakcji
C_my := 0.9
# Charakterystyczna nośność przy ściskaniu:
N_Rk := A_ryg*f_y = 1999.25 kN
# Charakterystyczna nośność przy zginaniu:
M_y.Rk := W_pl.y.ryg*f_y = 280.225 kN*m
k_yy := min(C_my*(1 + (λ_y - 0.2)*N_Ed/(χ_y*N_Rk/γ_M1)), C_my*(1 + 0.8*N_Ed/(χ_y*N_Rk/γ_M1)))
k_zy := 0
# Sprawdzenie interakcyjnych formuł nośności słupa
N_Ed/(χ_y*N_Rk/γ_M1) + k_yy*M_y.Ed/(χ_LT.mod*M_y.Rk/γ_M1) =  # error
# <
1
# Stateczność rygla jest zapewniona.
